# Дальномер с ФМС. Вариант 341.
# Исходные данные.
V_max := 2160*1000/3600
V_max = 600  # м/c  # Максимальная скорость ЛА.
R_0max := 420000  # м  # Максимальная дальность обнаружения.
l_α := 1.7  # м
# Размер антенны в азимутальной
#
# и угломестной плоскостях.
l_β := 0.4  # м
ϕ_α := 6  # град  # Ширина ДНА в азимутальной плоскости.
P_ос := 3  # Вт  # Излучаемая мощность.
m := 8  # Степень формирующего полинома.
L_вч := 9  # дБ  # Потери на высокой частоте.
L_обр := 5  # дБ  # Потери при обработке.
L_вч := 10^(0.1*L_вч)
L_вч = 7.94328  # раз
L_обр := 10^(0.1*L_обр)
L_обр = 3.16228  # раз
σ_Σ := 5  # м  # Суммарная погрешность измерения дальности.
N_ш := 5  # раз  # Коэффициент шума приёмника.
η := 0.8  # КПД фидерных трактов опорной станции.
T_пл := 2*3600
T_пл = 7200  # с  # Время полёта ЛА.
K_з := 1.1  # Коэффициент запаса.
c := 3*10^8  # м/c  # Скорость распространения э/м волны в вакууме.
k := 1.38*10^-23  # Дж/К  # Постоянная Больцмана.
T_0 := 290  # К  # Стандартная температура.
# 1. Расчёт длины волны и параметров антенны опорной станции.
# Длина волны сигнала, излучаемого опорной станцией.
λ := l_α*sin(ϕ_α*π/180)/0.886
λ = 0.200563  # м
# Ширина ДНА в угломестной плоскости.
ϕ_β := asin(0.886*λ/l_β)*180/π
ϕ_β = 26.3751  # град
# Коэффициент усиления антенны.
G_а := 41000*η/(ϕ_α*ϕ_β)
G_а = 207.266
# Эффективная площадь антенны.
S_а := G_а*λ^2/(4*π)
S_а = 0.663465  # м^2
# 2. Расчёт параметров сигнала.
# Длительность кода.
T_пк := K_з*R_0max/c
T_пк = 0.00154  # c
# Число элементов кода.
N_э := 2^m - 1
N_э = 255
# Длительность дискрета.
T_к := T_пк/N_э
T_к = 6.03922e-6  # c
# 3. Расчёт погрешностей.
# 1. Этап.
σ_Σ1 := σ_Σ
σ_Σ1 = 5  # м
# Динамическая погрешность.
σ_д1 := σ_Σ1/sqrt(5)
σ_д1 = 2.23607  # м
# Флюктуационная погрешность.
σ_фл1 := 2*σ_д1
σ_фл1 = 4.47214  # м
sqrt(σ_д1^2 + σ_фл1^2) = 5
# Постоянная времени инерционного звена.
T_2 := 1  # c
# Полоса пропускания следящего измерителя.
ΔF_и1 := sqrt(V_max/(4*σ_д1*T_2))
ΔF_и1 = 8.19036  # Гц
# Эквивалентная спектральная плотность шума на нулевой частоте.
G_э1 := σ_фл1^2/(2*ΔF_и1)
G_э1 = 1.22095  # м^2/Гц
q_1э := (c*T_к)^2/(2*G_э1*1/T_к)
q_1э = 8.11815
q_1 := 1.6*q_1э
q_1 = 12.989
# 2. Этап.
q_2 := q_1*(0.5*R_0max/R_0max)^2
q_2 = 3.24726
q_2э := q_2/1.6
q_2э = 2.02954
G_э2 := (c*T_к)^2/(2*q_2э*1/T_к)
G_э2 = 4.88379  # м^2/Гц
σ_фл2 := sqrt(2*G_э2*ΔF_и1)
σ_фл2 = 8.94427  # м
σ_д2 := V_max/(4*ΔF_и1^2)
σ_д2 = 2.23607  # м
σ_Σ2 := sqrt(σ_д2^2 + σ_фл2^2)
σ_Σ2 = 9.21954  # м
# 3. Этап.
ΔF_и2 := nthroot(V_max^2/(8*G_э2*T_2), 5)
ΔF_и2 = 6.20713  # Гц
σ_д3 := V_max/(4*ΔF_и2^2*T_2)
σ_д3 = 3.89322  # м
σ_фл3 := sqrt(2*G_э2*ΔF_и2)
σ_фл3 = 7.78644  # м
σ_Σ3 := sqrt(σ_д3^2 + σ_фл3^2)
σ_Σ3 = 8.70551  # м
# 4. Этап.
σ_д4 := V_max/(4*ΔF_и2^2*T_2)
σ_д4 = 3.89322  # м
σ_фл4 := sqrt(2*G_э1*ΔF_и2)
σ_фл4 = 3.89322  # м
σ_Σ4 := sqrt(σ_д4^2 + σ_фл4^2)
σ_Σ4 = 5.50585  # м
# 4. Расчёт энергетических параметров.
ΔF_пут := 1.2/(N_э*T_к)
ΔF_пут = 779.221  # Гц
# Пороговая мощность.
P_пор := q_2*k*T_0*ΔF_пут*N_ш*L_обр
P_пор = 1.60112e-16  # Вт
# Максимальная дальность действия.
R_max := sqrt((P_ос*G_а*λ^2)/((4*π)^2*P_пор*L_вч))
R_max = 11159694  # м
# 6. Расчёт вспомогательных параметров.
f_эт := 1/T_к
f_эт = 165584  # Гц
σ_Σmin := min(σ_Σ1, σ_Σ2, σ_Σ3, σ_Σ4)
δf_эт := 0.1*σ_Σmin/(c*T_пл)
δf_эт = 2.31481e-13
