# Исходные данные
Σ := 1
Vmax := 2160
pl := 1
Rmax0 := 420
lα := 1.7
lβ := 0.4
φα := 6*π/180
Poc := 3
m := 8
σ[Σ] := 5
L[Σ] := 9
ζ[Σ] := 5
T[pl] := 3600
# 1.Расчет длины волны и параметров антенны опорной станции
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λ := lα*sin(φα)/0.886 = 0.200563
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φβ := asin(0.886*λ/lβ) = 0.460332
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Ga := 41000*0.8/(φα*φβ) = 680415
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Sa := Ga*λ^2/(4*π) = 2178.03
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Kz := 1.1
c = 299792458 m/s  # (скрость*света)
Tp_k. := Kz*Rmax0/c = 1.54107e-6 s/m
τk := Tp_k./(2^m - 1) = 6.0434e-9 s/m
Ne := Tp_k./τk = 255
# Запишем формирующий код полином при m=8
p(x) = x^8 + x^4 + x^3 + x^2 + 1  # disabled  # которому соответствует двоичная форма 100011101
# M последовательность:
000011011010100111011010000
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ΔFc := 1/τk = 165469863 m/s
Δfupch := ΔFc  # полоса*пропускания  # УПЧ
# Число анализируемых элементарных ячеек по задержке
Ni := Tp_k./τk = 255
# Число обрабатываемых в одном цикле периодов повторения кода :
n := 2*(2^m - 1)*τk = 3.08213e-6 s/m
# Максимальное время поиска сигнала
Tr := 2*n*Tp_k.*Ni = 2.42238e-9 s^2/m^2
# Структурная схема генератора:
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q := 20
qe := 2*q^2*sqrt(1 + q)/((1 + sqrt(1 + q))^2 + 0.5*q*(1 + 2*sqrt(1 + q))) = 27.6024
Ge := (c*τk)^2/(2*qe*Δfupch) = 3.59342e-10 s/m
5.Расчет энергетических параметров
P2min := 1
Rimax := Poc*Ga*λ^2/((4*π)^2*P2min*L[Σ]) = 57.774
# 6. Расчет вспомогательных параметров
# Параметры эталонного генератора:
fet := 1/τk = 165469863 m/s
fet = f[t_k.]  # disabled
δfet := 0.1*σ[Σ]/(c*T[pl]) = 4.63283e-13 s/m
ΔRnch := c*T[pl]*δfet = 0.5
# Полная погрешность измерения дальности:
