# Исходные данные:
# Максимальная скорость ЛА.
V_max := 2160*1000/3600 = 600  # м/c
# Максимальная дальность обнаружения.
R_0max := 420000  # м
# Размер антенны в азимутальной
#
# и угломестной плоскостях.
l_α := 1.7  # м
l_β := 0.4  # м
# Ширина ДНА в азимутальной плоскости.
ϕ_α := 6  # град
# Излучаемая мощность.
P_ос := 3  # Вт
# Степень формирующего полинома.
m := 8
# Потери на высокой частоте.
# Потери при обработке.
L_Σ := 10^(0.1*9) = 7.94328  # раз
ξ_Σ := 10^(0.1*5) = 3.16228  # раз
# Суммарная погрешность измерения дальности.
σ_Σ := 5  # м
# Коэффициент шума приёмника.
N_ш := 10  # раз
# КПД фидерных трактов опорной станции.
η := 0.8
# Время полёта ЛА.
T_пл := 1*3600
T_пл = 3600  # с
# Коэффициент запаса. | Скорость распространения э/м волны в вакууме.
K_з := 1.1
c := 3*10^8  # м/c
# Постоянная Больцмана.
k := 1.38*10^-23  # Дж/К
# Стандартная температура.
T_0 := 290  # К
# 2) Расчёт длины волны и параметров антенны опорной станции.
# Длина волны сигнала, излучаемого опорной станцией.
λ := l_α*sin(ϕ_α*π/180)/0.886 = 0.200563  # м
# Ширина ДНА в угломестной плоскости.
ϕ_β := asin(0.886*λ/l_β)*180/π = 26.3751  # град
# Коэффициент усиления антенны.
G_а := 41000*η/(ϕ_α*ϕ_β) = 207.266
# Эффективная площадь антенны.
S_а := G_а*λ^2/(4*π) = 0.663465  # м^2
# 3) Расчёт параметров сигнала.
# Период повторения кода.
T_пк := K_з*R_0max/c = 0.00154  # c
# Число элементов кода.
N_э := 2^m - 1 = 255
# Длительность одного жлемента.
τ_к := T_пк/N_э = 6.03922e-6  # c
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# Геренатор кода:
# По заданному значению "памяти" последовательности m = 8 записывается формирующий код полином:
# p(x) = x^8 + x^6 + x^5 + x^4 +1;
# а_7 = а_3 = а_2 = а_1 = 0;  а_8 = а_6 = а_5 = а_4 =1.
# Кодовая последовательность в двоичной форме будет иметь вид:
# 101110001
# 4) Выбор параметров утсройств обработки сигнала.
# Полоса пропускания УПЧ:
ΔF_c := 1/τ_к = 165584  # Гц
Δf_упч := ΔF_c = 165584  # Гц
# Устройство корреляционной обработки:
# Следует определить число n обрабатываемых в одном цикле (за время T_R) периодов повторения кода T_пк и значение Т_к.
# Чем больше n, тем выше достоверность получаемых результатов, но зато больше времени требуется на обработку сигналов. Обычно n = 4...5.
n := 4
# Параметры поиска сигнала:
# Число анализируемых элементарных ячеек по задержке:
N_я := T_пк/τ_к = 255
# Максимальное время поиска сигнала составляет:
T_R := 2*n*T_пк*N_я = 3.1416
# Требуемая достоверность обнаружения сигнала достигается за время:
T_к := n*T_пк = 0.00616  # с
# 5) Расчёт погрешностей.
# Этап 1
R_1 == R_min
R == R_1
R_0 == R_1
σ_Σ1 := σ_Σ = 5  # м
# Динамическая погрешность.
σ_д1 := σ_Σ1/sqrt(5) = 2.23607  # м
# Флюктуационная погрешность.
σ_фл1 := 2*σ_д1 = 4.47214  # м
# Постоянная времени инерционного звена.
T_2 := 1  # c
# Полоса пропускания следящего измерителя.
ΔF_и1 := sqrt(V_max/(4*σ_д1*T_2)) = 8.19036  # Гц
# Эквивалентная спектральная плотность шума на нулевой частоте.
G_э1 := σ_фл1^2/(2*ΔF_и1) = 1.22095  # м^2/Гц
q_1э := (c*τ_к)^2/(2*G_э1*1/τ_к) = 8.11815
q_1 := 1.6*q_1э = 12.989
# Этап 2
R_2 == R_max
R == R_2
R_0 == R_1
q_2 := q_1*(0.5*R_0max/R_0max)^2 = 3.24726
q_2э := q_2/1.6 = 2.02954
G_э2 := (c*τ_к)^2/(2*q_2э*1/τ_к) = 4.88379  # м^2/Гц
σ_фл2 := sqrt(2*G_э2*ΔF_и1) = 8.94427  # м
σ_д2 := V_max/(4*ΔF_и1^2) = 2.23607  # м
σ_Σ2 := sqrt(σ_д2^2 + σ_фл2^2) = 9.21954  # м
# Этап 3
R_2 == R_max
R_0 == R_2
R == R_2
ΔF_и2 := nthroot(V_max^2/(8*G_э2*T_2), 5) = 6.20713  # Гц
σ_д3 := V_max/(4*ΔF_и2^2*T_2) = 3.89322  # м
σ_фл3 := sqrt(2*G_э2*ΔF_и2) = 7.78644  # м
σ_Σ3 := sqrt(σ_д3^2 + σ_фл3^2) = 8.70551  # м
# Этап 4
R_1 == R_min
R_0 == R_2
R == R_1
σ_д4 := V_max/(4*ΔF_и2^2*T_2) = 3.89322  # м
σ_фл4 := sqrt(2*G_э1*ΔF_и2) = 3.89322  # м
σ_Σ4 := sqrt(σ_д4^2 + σ_фл4^2) = 5.50585  # м
# Зависимости суммарной погрешности от отношения R/R.max:
x_1 := transpose([σ_Σ1, σ_Σ2])
x_2 := transpose([σ_Σ3, σ_Σ4])
y_1 := transpose([0.5*R_0max, R_0max])
y_2 := transpose([R_0max, 0.5*R_0max])
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# 6) Расчёт энергетических параметров.
ΔF_пут := 1.2/τ_к = 198701  # Гц
# Пороговая мощность.
P_пор := q_2*k*T_0*ΔF_пут*N_ш*ξ_Σ = 8.16573e-14  # Вт
# Максимальная дальность действия.
R_max := sqrt((P_ос*G_а*λ^2)/((4*π)^2*P_пор*L_Σ)) = 494160  # м
# 7) Расчёт вспомогательных параметров.
# Частота эталонного генератора:
f_эт := 1/τ_к = 165584  # Гц
# Относительная нестабильность частоты:
σ_Σmin := min(σ_Σ1, σ_Σ2, σ_Σ3, σ_Σ4)
δf_эт := 0.1*σ_Σmin/(c*T_пл) = 4.62963e-13
# Рекомендуется задать
δf_эт := 10^-11  # cоответствующую термостабилизированному и виброзащищенному
# кварцевому генератору,и определить соответствующую погрешность
ΔR_нч := c*T_пл*δf_эт = 10.8
ΔR := 0.35*σ_Σmin = 1.75
# Погрешность дискретизации:
σ_дск := ΔR/sqrt(12) = 0.505181  # м
# Полная погрешность измерения дальности:
σ_п := sqrt(σ_Σ^2 + σ_дск^2 + ΔR_нч^2) = 11.912  # м
# Технические требования:
# 1)Требования к антенне опорной станции:
# 1.Длина волны сигнала:
λ := 0.201
# 2.Рабочая частота :
f := c/λ = 1.49254e9  # Гц
# 3.Ширина диаграммы направленности в угломестной плоскости
ϕ_β := 26.437  # град
# 4.Коэффициент усиления антенны
G_а := 206.781
# 5.Ширина ДН в азимутальной плоскости
ϕ_α := 6  # град
# 6. Излучаемая мощность
P_ос := 3  # Вт
# 7.КПД фидерных трактов 0.8
# 2)Требования к сигналу и генератору кода:
# 1. Длительност кода
T_пк := 1.54*10^-3  # c
# 2. Число элементов кода
N_э := 255
# 3. Длительность дискрета
T_к := 6.039*10^-6  # c
# 4. Частота эталонного генератора
f_эт := 1.656*10^5  # c
# 5 . Относительная нестабильность чатоты:
# не менее
δf_эт := 10^-11
# 3)Требования к приемнику:
# 1. Коэффициент шума приемника
N_ш := 10  # раз
# 2. Полоса пропускания
ΔF_пут := 779.249  # Гц
# 3. Пороговая мощность
P_пор := 3.2*10^-16  # Вт
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